// COMSOL Multiphysics 5.5.0.292 model "MicroNeedle.mph"
// Outline of the model tree

Functions
  an1: Analytic | funcname = V; expr = 0.14*sin(200*t); args = t; argunit = t; fununit = V

Common definitions
  amth_ht: AmbientProperties "Ambient Thermal Properties (ht)"

Geometry
  geom1 "Geometry 1" (3D, length unit µm)
    imp1: Import | type = cad; filename = C:\Users\ASUS\Desktop\CADs\Thermal Actuator Micro Needle.STEP; fillholes = on
    fin: Finalize "Form Union"

Materials
  mat2: Common "Tantalum [solid]" on domains 1
    def "Basic"
      thermalconductivity = k_solid_1(T[1/K])[W/(m*K)]
      resistivity = res_solid_1(T[1/K])[ohm*m]
      Syt = Syt(T[1/K])[Pa]
      thermalexpansioncoefficient = (alpha_solid_1(T[1/K])[1/K]+(Tempref-293[K])*if(abs(T-Tempref)>1e-3,(alpha_solid_1(T[1/K])[1/K]-alpha_solid_1(Tempref[1/K])[1/K])/(T-Tempref),d(alpha_solid_1(T[1/K])[1/K],T)))/(1+alpha_solid_1(Tempref[1/K])[1/K]*(Tempref-293[K]))
      heatcapacity = C_solid_1(T[1/K])[J/(kg*K)]
      electricconductivity = sigma_solid_1(T[1/K])[S/m]
      HC = HC_solid_1(T[1/K])[J/(mol*K)]
      VP = VP(T[1/K])[Pa]
      emissivity = epsilon(T[1/K])
      density = rho_solid_1(T[1/K])[kg/m^3]
      TD = TD(T[1/K])[m^2/s]
      nemiss = nemiss(T[1/K])
      relpermittivity = 25
      k_solid_1: Piecewise
        arg = T
        pieces = 
          {0.0, 30.0, 10.91909*T^1+0.2418937*T^2-0.02921585*T^3+3.578308E-4*T^4+2.872536E-6*T^5}
          {30.0, 100.0, 340.7748-12.43035*T^1+0.2013305*T^2-0.00128721*T^3+9.135352E-7*T^4+1.440532E-8*T^5}
          {100.0, 500.0, 66.26104-0.117828*T^1+6.116671E-4*T^2-1.576487E-6*T^3+2.063635E-9*T^4-1.087359E-12*T^5}
          {500.0, 3200.0, 56.20257+0.003999027*T^1-6.786617E-8*T^2+1.284695E-10*T^3-5.624924E-14*T^4}
      res_solid_1: Piecewise "Piecewise 1a"
        arg = T
        pieces = 
          {4.0, 30.0, 9.035461E-10+4.094194E-11*T^1-5.24211E-12*T^2+2.298285E-13*T^3}
          {30.0, 200.0, -7.513707E-9+3.289043E-10*T^1+1.49958E-12*T^2-3.936386E-15*T^3}
          {200.0, 3258.0, -1.635703E-8+5.303238E-10*T^1-8.518049E-14*T^2+1.080526E-17*T^3}
      Syt: Piecewise
        arg = T
        pieces = 
          {293.0, 623.0, -1.573594E8+5193401.0*T^1-21144.15*T^2+34.81135*T^3-0.02002894*T^4}
          {623.0, 773.0, 1.111224E10-6.780276E7*T^1+156672.6*T^2-158.4405*T^3+0.0591*T^4}
          {773.0, 973.0, 6.615493E8-789576.0*T^1+309.5714*T^2}
          {973.0, 1873.0, -1.658282E9+6252228.0*T^1-7364.899*T^2+3.575474*T^3-6.246425E-4*T^4}
      alpha_solid_1: Piecewise "Piecewise 1b" | arg = T; pieces = {293.0, 2800.0, 6.44036E-6+5.2E-10*T^1}
      C_solid_1: Piecewise "Piecewise 1c"
        arg = T
        pieces = 
          {100.0, 400.0, 23.00158+1.387261*T^1-0.006570248*T^2+1.435758E-5*T^3-1.182907E-8*T^4}
          {400.0, 2300.0, 126.837+0.05224724*T^1-3.473607E-5*T^2+1.148036E-8*T^3-7.699568E-13*T^4}
          {2300.0, 3258.0, 74.52273+0.07639863*T^1-6.610812E-6*T^2-8.805111E-9*T^3+2.617453E-12*T^4}
      sigma_solid_1: Piecewise "Piecewise 1d"
        arg = T
        pieces = 
          {4.0, 30.0, 1/(2.298285E-13*T^3-5.242110E-12*T^2+4.094194E-11*T+9.035461E-10)}
          {30.0, 200.0, 1/(-3.936386E-15*T^3+1.499580E-12*T^2+3.289043E-10*T-7.513707E-09)}
          {200.0, 3258.0, 1/(1.080526E-17*T^3-8.518049E-14*T^2+5.303238E-10*T-1.635703E-08)}
      HC_solid_1: Piecewise "Piecewise 1e"
        arg = T
        pieces = 
          {100.0, 400.0, 4.16209+0.2510222*T^1-0.001188874*T^2+2.597976E-6*T^3-2.140446E-9*T^4}
          {400.0, 2300.0, 22.9509+0.009454037*T^1-6.285422E-6*T^2+2.077349E-9*T^3-1.393221E-13*T^4}
          {2300.0, 3258.0, 13.48474+0.01382418*T^1-1.196214E-6*T^2-1.593267E-9*T^3+4.736229E-13*T^4}
      VP: Piecewise | arg = T; pieces = {293.0, 2500.0, (exp((-4.134600e+04/T-3.215200e+00*log10(T)+1.968781e+01+7.437000e-01/T^3)*log(10.0)))*1.333200e+02}
      epsilon: Piecewise | arg = T; pieces = {2273.0, 3000.0, 0.1953953+4.381395E-5*T^1}
      rho_solid_1: Piecewise "Piecewise 1f"
        arg = T
        pieces = 
          {90.0, 160.0, 16458.63+6.363682*T^1-0.09050005*T^2+6.252019E-4*T^3-2.142246E-6*T^4+2.908961E-9*T^5}
          {160.0, 600.0, 16612.73+0.2209123*T^1-0.001153023*T^2+8.122588E-7*T^3-7.415464E-11*T^4}
          {600.0, 2800.0, 16694.29-0.3153822*T^1-2.22863E-5*T^2+7.028008E-10*T^3}
      TD: Piecewise
        arg = T
        pieces = 
          {293.0, 673.0, 2.994303E-5-2.437802E-8*T^1+4.606014E-11*T^2-4.149119E-14*T^3+1.44503E-17*T^4}
          {673.0, 1573.0, 2.66795E-5-5.63029E-9*T^1+5.519667E-12*T^2-2.529568E-15*T^3+4.540267E-19*T^4}
      nemiss: Piecewise | arg = T; pieces = {1300.0, 2800.0, -0.04725696+1.627855E-4*T^1-1.352556E-8*T^2}
    ThermalExpansion
      dL = (dL_solid_1(T[1/K])-dL_solid_1(Tempref[1/K]))/(1+dL_solid_1(Tempref[1/K]))
      dLIso = (dL_solid_1(T)-dL_solid_1(Tempref))/(1+dL_solid_1(Tempref))
      dL_solid_1: Piecewise
        arg = T
        pieces = 
          {90.0, 160.0, 0.002830506-1.274517E-4*T^1+1.8125E-6*T^2-1.252111E-8*T^3+4.290308E-11*T^4-5.825759E-14*T^5}
          {160.0, 500.0, -0.003272286+4.671197E-5*T^1-3.017095E-7*T^2+9.509378E-10*T^3-1.356272E-12*T^4+7.239301E-16*T^5}
          {500.0, 2800.0, -0.001887025+6.288E-6*T^1+5.2E-10*T^2-1.550964E-25*T^3}
    Enu "Young's modulus and Poisson's ratio"
      youngsmodulus = E(T[1/K])[Pa]
      poissonsratio = nu(T[1/K])
      E: Piecewise
        arg = T
        pieces = 
          {0.0, 100.0, 1.91707E11-4692401.0*T^1-164495.6*T^2}
          {100.0, 293.0, 1.91729E11-7144630.0*T^1-179942.5*T^2+340.1588*T^3}
          {293.0, 500.0, 1.697231E11+8.470657E7*T^1-137425.1*T^2}
          {500.0, 900.0, 2.375362E11-1.59949E8*T^1+80782.31*T^2}
          {900.0, 2100.0, 1.687358E11-9567813.0*T^1-1367.68*T^2}
          {2100.0, 2673.0, -9.913539E10+2.636805E8*T^1-70741.07*T^2}
      nu: Piecewise | arg = T; pieces = {293.0, 950.0, 0.2768954+1.877451E-6*T^1}
    KG "Bulk modulus and shear modulus"
      K = kappa(T[1/K])[Pa]
      G = mu(T[1/K])[Pa]
      mu: Piecewise | arg = T; pieces = {293.0, 950.0, 7.74E10-1.73E7*T^1}
      kappa: Piecewise | arg = T; pieces = {293.0, 3100.0, 1.954168E11-1.805428E7*T^1+1714.379*T^2-0.6040266*T^3}

Physics
  ec: ConductiveMedia "Electric Currents" on all domains
    dependent variable V
    cucn1: CurrentConservation (default)
    ein1: ElectricInsulation (default)
    init1: init "Initial Values 1" (default)
    pot1: ElectricPotential on boundaries 23 | V0 = V(t)
    gnd1: Ground on boundaries 22
  ht: HeatTransfer "Heat Transfer in Solids" on all domains
    dependent variable T
    solid1: SolidHeatTransferModel "Solid 1" (default)
    init1: init "Initial Values 1" (default)
    ins1: ThermalInsulation (default)
    hf1: HeatFluxBoundary "Heat Flux 1" on boundaries 1-10, 13-16, 20-23 | HeatFluxType = ConvectiveHeatFlux; h = 20000
  solid: SolidMechanics on all domains
    dependent variable u = {u, v, w}
    lemm1: LinearElasticModel "Linear Elastic Material 1" (default)
    free1: Free (default)
    init1: init "Initial Values 1" (default)
    fix1: Fixed "Fixed Constraint 1" on boundaries 22, 23

Multiphysics
  tc1: TemperatureCoupling | TemperatureSource_physics = ht; TemperatureDestination_physics = ec
  emh1: ElectromagneticHeating | EMHeat_physics = ec; Heat_physics = ht
  te1: ThermalExpansion on domains 1 | Heat_physics = ht; Solid_physics = solid

Mesh
  mesh1 "Mesh 1"
    size: MeshSizeDefault | hmax = 46.8; hmin = 5.85; hcurve = 0.5; hnarrow = 0.6; hgrad = 1.45; hauto = 4
    ftet1: FreeTet "Free Tetrahedral 1" on remaining entities | optcurved = on

Studies
  std1 "Study 1"
    time: Transient "Time Dependent" | tlist = range(0,0.01,120)

Solver configurations
  sol1 "Solution 1" (study std1)
    v1: Variables "Dependent Variables 1"
      comp1_u: Field "Displacement field (comp1.u)" | scalemethod = manual; scaleval = 1e-2*0.000636199654197
    t1: Time "Time-Dependent Solver 1"
      tlist = range(0,0.01,120)
      atolmethod = {comp1_T, global, comp1_u, global, comp1_V, global}
      atolvaluemethod = {comp1_T, factor, comp1_u, factor, comp1_V, factor}
      atol = {comp1_T, 1e-3, comp1_u, 1e-3, comp1_V, 1e-3}
      maxorder = 2
      estrat = exclude
      se1: Segregated | segstabacc = segaacc; segaaccdim = 5; segaaccmix = 0.9; segaaccdelay = 1
        ss1: SegregatedStep | segvar = {comp1_V}; linsolver = i1
        ss2: SegregatedStep "Heat transfer T" | segvar = {comp1_T}; linsolver = d1; subjtech = once
        ss3: SegregatedStep | segvar = {comp1_u}; linsolver = d2
        ll1: LowerLimit | lowerlimit = comp1.T 0
      i1: Iterative | linsolver = cg
        mg1: Multigrid | prefun = amg
      d1: Direct "PARDISO ht (te1)" | linsolver = pardiso; pivotperturb = 1.0E-13
      d2: Direct "Suggested Direct Solver solid (te1)"

Datasets
  dset1: Solution | solution = sol1

Plots
  pg1: PlotGroup3D "Electric Potential (ec)" | data = dset1
    mslc1: Multislice | expr = V
  pg2: PlotGroup3D "Temperature (ht)" | data = dset1
    surf1: Surface | expr = T
  pg3: PlotGroup3D "Isothermal Contours (ht)" | data = dset1
    iso1: Isosurface | expr = T
  pg4: PlotGroup3D "Stress (solid)" | data = dset1
    surf1: Surface | expr = solid.mises; unit = MPa
      def: Deform "Deformation" | expr = {u, v, w}; descr = Displacement field
  pg5: PlotGroup3D "Displacement" | data = dset1
    surf1: Surface | expr = solid.disp

Exports
  anim1: Animation "Electric Potential" | target = player; maxframes = 60; frametime = 0.2
  anim2: Animation "Temperature" | target = player; maxframes = 60; frametime = 0.2
  anim3: Animation "Stress"
    movietype = avi
    giffilename = C:\Users\Shayan\Documents\Shayan Docs\Docs\MEMS\MEMS Class\Project\Stress.gif
    maxframes = 60
  anim4: Animation "Displacement" | target = player; maxframes = 60; frametime = 0.2